# https://ru.dsplib.org/content/filter_butter_ap/filter_butter_ap.html
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f_d := 5000  # Гц - частота дискретизации
samples := 100
n := 0 .. samples - 1
dt := 1/f_d = 0.0002
tt[n] := n*dt
df := f_d/samples = 50
h(t, H) := 1/f_d*integral(H(f)*e^(1i*2*π*f*t), f = -f_d/2 .. f_d/2)
db(x) := 10^(x/20)
db_P(x) := 10^(x/10)
to_db(x) := 20*log(|x|)
to_dbP(x) := 10*log(|x|)
roundup(x) := Trunc(x, 1) + (Trunc(x, 1) ≠ x)
abs(z) := |z|
circle_x[n] := cos(2*π/(samples - 1)*n)
circle_y[n] := sin(2*π/(samples - 1)*n)
Z(p_0, f_d) := (2*f_d + p_0)/(2*f_d - p_0)
Ω(T_d, ω) := 2/T_d*tan(ω/2)
f_analog(f_digital., f_d) := f_d/π*tan(π*f_digital./f_d)
f_p := 1/1*5000/π = 1591.55  # Гц - частота пропускания
f_p1 := 500
f_d1 := 5000
f_s := 1/2*5000/π = 795.775  # Гц - частота подавления
ω_p := 2*π*f_p/f_d = 0.63662*π
# Нормированная полоса среза
ω_p = 2
f_s1 := 1500
ω_s := 2*π*f_s/f_d = 0.31831*π
# Нормированная полоса заграждения
ω_s = 1
ω_p1 := 2*π*f_p1/f_d1 = 0.2*π
R_p := 1
(-R_p) db = 0.891251  # Неравномерность в полосе пропускания (дБ)
ω_s1 := 2*π*f_s1/f_d1 = 0.6*π
R_s := 40
(-R_s) db = 0.01  # Уровень подавления в полосе заграждения (дБ)
F_p := f_analog(f_p, f_d) = 2478.69
F_s := f_analog(f_s, f_d) = 869.467
Ω_p := 2*π*F_p = 15574.1  # Частота среза аналогового фильтра
Ω_s := 2*π*F_s = 5463.02  # Частота заграждения аналогового фильтра
# Порядок фильтра
ε_p := sqrt(10^(R_p/10) - 1) = 0.508847
ε_s := sqrt(10^(R_s/10) - 1) = 99.995
1/ε_s = 0.0100005
ε_s/ε_p = 196.513
ln(ε_s/ε_p) = 5.28073
Ω_s/Ω_p = 0.350777
ln(Ω_s/Ω_p) = -1.04761
# Порядок фильтра
N := ln(ε_s/ε_p)/ln(F_p/F_s) = 5.04076
N1 := N
N := ceil(N) = 6
α := 1/nthroot(ε_p, N) = 1.11919
N1 = 5.04076
# Число парных полюсов
L := Trunc(N/2, 1) = 3
r := mod(N, 2) = 0
2*L + r = 6
θ(n) := (2*n - 1)/(2*N)*π
θ(n) := π/N*(n - 1/2)
poles(r, L) :=
    i ← 0
    if r ≠ 0
        P[i] ← -α
        i ← 1
    for n ∈ 1 .. L
        P[i] ← α*(-sin(θ(n)) + 1i*cos(θ(n)))
        P[i + 1] ← α*(-sin(θ(n)) - 1i*cos(θ(n)))
        i ← i + 2
    P
p_p := poles(r, L)
p_0 := matrix(N, 1, f(n, m) ← 0)
p_p1 := Ω_p/p_p
p_p1 = [-3601.61 - 13441.4i; -3601.61 + 13441.4i; -9839.78 - 9839.78i; -9839.78 + 9839.78i; -13441.4 - 3601.61i; -13441.4 + 3601.61i]
Kz(p) := 1/product(2*f_d - p[n], n = 0 .. N - 1)
z0 := vectorize(Z(p_p, f_d))
Kz1 := Kz(p_p1) = 9.91338e-27
z0 = [0.999942 + 0.000216198i; 0.999942 - 0.000216198i; 0.999842 + 0.000158252i; 0.999842 - 0.000158252i; 0.999784 + 5.79208e-5i; 0.999784 - 5.79208e-5i]
z1 := vectorize(Z(p_p1, f_d))
z_01 := vectorize(Z(p_0, f_d))
z1 = [-0.256081 - 0.735156i; -0.256081 + 0.735156i; -0.190936 - 0.401265i; -0.190936 + 0.401265i; -0.166484 - 0.128064i; -0.166484 + 0.128064i]
z_01 = [1; 1; 1; 1; 1; 1]
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H(p) := p^N/product(p - p_p1[n], n = 0 .. N - 1)
G_z0 := product(1 + z1[n], n = 0 .. N - 1)/product(1 + z_01[n], n = 0 .. N - 1)
H_z2(z) := G_z0*product(1 - z_01[n]*z^-1, n = 0 .. N - 1)/product(1 - z1[n]*z^-1, n = 0 .. N - 1)
H_z(z) := H(2*f_d*(1 - z^-1)/(1 + z^-1))
Mdb := [0.1*F_s, -R_s; F_s, -R_s; F_s, -R_p; F_p, -R_p]
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M := [0.1*f_s, (-R_s) db; f_s, (-R_s) db; f_s, (-R_p) db; f_p, (-R_p) db]
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[0.1*f_s, (-R_p) db; f_s, (-R_p) db; □, □]
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hh_z2 := vectorize(h(tt, H(f) ← H_z2(e^(1i*2*π*f/f_d))))
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ff := 0, 2*f_d/100 .. f_d
Φ(f) := integral(-|d/df1(arg(H_z(e^(1i*2*π*f1/f_d)))/π)|, f1 = 0 .. f)
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