# https://ru.dsplib.org/content/filter_butter_ap/filter_butter_ap.html
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db(x) := 10^(x/20)
db_P(x) := 10^(x/10)
to_db(x) := 20*log(|x|)
to_dbP(x) := 10*log(|x|)
roundup(x) := Trunc(x, 1) + (Trunc(x, 1) ≠ x)
abs(z) := |z|
samples := 100
n := 0 .. samples - 1
circle_x[n] := cos(2*π/(samples - 1)*n)
circle_y[n] := sin(2*π/(samples - 1)*n)
Z(p_0, f_d) := (2*f_d + p_0)/(2*f_d - p_0)
f_p := 500  # Гц - частота пропускания
f_d := 5000  # Гц - частота дискретизации
f_p1 := 500
f_d1 := 5000
f_s := 1500  # Гц - частота подавления
dt := 1/f_d = 0.0002
tt[n] := n*dt
h(t, H) := 1/f_d*integral(H(f)*e^(1i*2*π*f*t), f = -f_d/2 .. f_d/2)
ω_p := 2*π*f_p/f_d = 0.2*π
# Нормированная полоса среза
ω_p = 0.628319
f_s1 := 1500
ω_s := 2*π*f_s/f_d = 0.6*π
# Нормированная полоса заграждения
ω_s = 1.88496
ω_p1 := 2*π*f_p1/f_d1 = 0.2*π
R_p := 1
(-R_p) db = 0.891251  # Неравномерность в полосе пропускания (дБ)
ω_s1 := 2*π*f_s1/f_d1 = 0.6*π
R_s := 30
(-R_s) db = 0.0316228  # Уровень подавления в полосе заграждения (дБ)
df := f_d/samples = 50
Ω(T_d, ω) := 2/T_d*tan(ω/2)  # Преобразование частот аналогового фильтра в частоты цифрового
f_analog(f_digital., f_d) := f_d/π*tan(π*f_digital./f_d)
F_p := f_analog(f_p, f_d) = 517.126
F_s := f_analog(f_s, f_d) = 2190.58
Ω_p := 2*π*F_p = 3249.2  # Частота среза аналогового фильтра
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tan(π*f_s/f_d)/tan(π*f_p/f_d) = 4.23607
sin(π*f_s/f_d)*cos(π*f_p/f_d)/(sin(π*f_p/f_d)*cos(π*f_s/f_d)) = 4.23607
Ω_s := 2*π*F_s = 13763.8  # Частота заграждения аналогового фильтра
# Порядок фильтра
ε_p := sqrt(10^(R_p/10) - 1) = 0.508847
k_ω :=
    [Σ, Δ] ← π/f_d*[f_s + f_p, f_s - f_p]
    (sin(Σ) + sin(Δ))/(sin(Σ) - sin(Δ))
    = 4.23607
ε_s := sqrt(10^(R_s/10) - 1) = 31.607
1/ε_s = 0.0316386
ε_s/ε_p = 62.1148
ln(ε_s/ε_p) = 4.12899
Ω_s/Ω_p = 4.23607
ln(Ω_s/Ω_p) = 1.44364
# Порядок фильтра
N := ln(ε_s/ε_p)/ln(Ω_s/Ω_p) = 2.86013
N1 := N
N := ceil(N) = 3
α := 1/nthroot(ε_p, N) = 1.25258
N1 = 2.86013
# Число парных полюсов
L := Trunc(N/2, 1) = 1
r := mod(N, 2) = 1
2*L + r = 3
θ(n) := (2*n - 1)/(2*N)*π
θ(n) := π/N*(n - 1/2)
poles(N, α) :=
    r ← mod(N, 2)
    p[0] ← -α if r > 0
    dθ ← 0.5*π/N
    for i ∈ r, r + 2 .. N - 1
        θ ← dθ*(i - r + 1)
        [s, c] ← [sin(θ), cos(θ)]
        [p[i]; p[i + 1]] ← -α*[s - 1i*c; s + 1i*c]
    p
H_0(p) := 1/ε_p/((p - (-α))^r*product(p^2 + 2*α*sin(θ(n))*p + α^2, n = 1 .. L))
H_1(p) := 1/ε_p/((p - (-α))^r*product((p - α*(-sin(θ(n)) + 1i*cos(θ(n))))*(p - α*(-sin(θ(n)) - 1i*cos(θ(n)))), n = 1 .. L))
p0 := poles(r, L)  # disabled
p0 := poles(N, α)
z0 := vectorize(Z(p0, f_d))
Kz(p) := 1/product(2*f_d - p[n], n = 0 .. N - 1)
p1 := p0*Ω_p
z1 := vectorize(Z(p1, f_d))
Kz1 := Kz(p1) = 4.51944e-13
H_z2(z) := Kz1*Ω_p^N*1/ε_p*(1 + z^-1)^N/product(1 - z1[n]*z^-1, n = 0 .. N - 1)
H_2(p) := 1/ε_p*1/product(p - p1[n], n = 0 .. N - 1)
H(p) := Ω_p^N*H_2(p)
z1 = [0.421478; 0.530554 + 0.448245i; 0.530554 - 0.448245i]
p1 = [-4069.87; -2034.93 + 3524.61i; -2034.93 - 3524.61i]
poles(5, α) = [-1.25258; -0.387067 + 1.19127i; -0.387067 - 1.19127i; -1.01336 + 0.736246i; -1.01336 - 0.736246i]
p0 = [-1.25258; -0.626288 + 1.08476i; -0.626288 - 1.08476i]
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(2*π*F_p)^N*Kz1/ε_p = 0.0304667
p1 = [-4069.87; -2034.93 + 3524.61i; -2034.93 - 3524.61i]
H(p) := H_2(p/(2*π*F_p))  # disabled
H_z(z) := H(2*f_d*(1 - z^-1)/(1 + z^-1))
H_z(1) = 1
H(1i*2*π*F_p) = -0.218234 - 0.864119i
|H(1i*2*π*F_p)| = 0.891251
product(p - p1[n], n = 0 .. N - 1)
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hh_z2 := vectorize(h(tt, H(f) ← H_z2(e^(1i*2*π*f/f_d))))
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3/f_p/dt = 30
ff := 0, 2*f_d/100 .. f_d
Φ(f) := integral(-|d/df1(arg(H_z(e^(1i*2*π*f1/f_d)))/π)|, f1 = 0 .. f)
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